# OpenSim document version 30000
Model:
  ForceSet:
    Millard2012EquilibriumMuscle [values shared by the 6 below unless stated]: pennation_angle_at_optimal=0 [radians]
        fatigue_factor=0 recovery_factor=0.2
    Millard2012EquilibriumMuscle Foot1: max_isometric_force=0.8 optimal_fiber_length=0.005358
        default_fiber_length=0.005358 tendon_slack_length=0.000536
      PathPoint MuscleAttachFoot1a: radius (0.008400174 2.05785e-5 0.001072551)
      PathPoint MuscleAttachFoot1b: radius (0.01148639 -3.148347e-5 0.0009669929)
      PathPoint MuscleAttachFoot1c: foot (0.0009872727 4.701666e-5 -2.562463e-5)
    Millard2012EquilibriumMuscle Foot2: max_isometric_force=0.8 optimal_fiber_length=0.005067
        default_fiber_length=0.005067 tendon_slack_length=0.000507
      PathPoint MuscleAttachFoot2a: radius (0.008870611 0.000269174 -4.195318e-5)
      PathPoint MuscleAttachFoot2b: radius (0.01245317 0.0004506335 -0.0003524737)
      PathPoint MuscleAttachFoot2c: foot (0.0002462899 -0.0008509054 -0.0001525151)
      PathPoint MuscleAttachFoot2d: foot (0.000996597 -0.0009210792 -0.0001959588)
    Millard2012EquilibriumMuscle Radius1: max_isometric_force=1 optimal_fiber_length=0.006026
        default_fiber_length=0.006026 tendon_slack_length=0.000603
      PathPoint MuscleAttachRadius1a: humerus (0.00336586 -0.001919562 8.38016e-5)
      PathPoint MuscleAttachRadius1b: radius (0.001896987 -0.0001850045 0.0002953256)
    Millard2012EquilibriumMuscle Radius2: max_isometric_force=1 optimal_fiber_length=0.005879
        default_fiber_length=0.005879 tendon_slack_length=0.000588
      PathPoint MuscleAttachRadius2a: humerus (0.006318892 0.0008410945 -0.0001358579)
      PathPoint MuscleAttachRadius2b: humerus (0.008082861 0.001477996 -0.0001725662)
      PathPoint MuscleAttachRadius2c: radius (-0.00207832 -0.0001911119 -0.0007068512)
    Millard2012EquilibriumMuscle Humerus1: max_isometric_force=1.4 optimal_fiber_length=0.0122
        default_fiber_length=0.0122 tendon_slack_length=0.00122
      PathPoint MuscleAttachHumerus1a: world (0.008286227 -0.06822497 0.02863539)
      PathPoint MuscleAttachHumerus1b: world (0.00959682 -0.07010712 0.02685566)
      PathPoint MuscleAttachHumerus1c: humerus (-0.001046537 -0.001586711 0.0002676689)
      PathPoint MuscleAttachHumerus1d: humerus (0.00491617 -0.001402961 3.783151e-5)
    Millard2012EquilibriumMuscle Humerus2: max_isometric_force=1.4 optimal_fiber_length=0.010242
        default_fiber_length=0.010242 tendon_slack_length=0.001024
      PathPoint MuscleAttachHumerus2a: world (0.008765571 -0.06584816 0.02867886)
      PathPoint MuscleAttachHumerus2b: world (0.00984282 -0.06665792 0.02661839)
      PathPoint MuscleAttachHumerus2c: humerus (0.002651698 0.0003004492 -0.0001533201)
      PathPoint MuscleAttachHumerus2d: humerus (0.005725718 0.0006771248 -0.0002905987)
